1
w8(s) := 22/((5*10^-3*s) + 1)
w15(s) := 3.76/((73*10^-4*s) + 1)
w33(s) := 0.55
w34(s) := 1.1/(43*10^-4*s)
w37(s) := 0.002
w38(s) := 0.55
wsum1(s) := w33(s)*w34(s) → 140.697674419/s
wsum2(s) := w15(s)*wsum1(s) → 529.023255814/(s*(73*s/10000 + 1))
f1(s) := (wsum2(s)*w8(s))/(1 + wsum2(s)*w38(s)) → 11638.5116279/(s*(290.962790698/(s*(73*s/10000 + 1)) + 1)*(s/200 + 1)*(73*s/10000 + 1))
f2(s) := 1/(1 + f1(s)*(1/wsum1(s))) → 1/(82.72/((290.962790698/(s*(73*s/10000 + 1)) + 1)*(s/200 + 1)*(73*s/10000 + 1)) + 1)
f3(s) := (f2(s)*w37(s))/(1 + f2(s)) simplify → (0.001*s^3 + 0.33698630137*s^2 + 67.2551768079*s + 7971.58330679)/((s + 6.65292011764)*(s^2 + 330.333381252*s + 1198208.18014))
nthroot(7951, 3) = 19.9591
19^2*3 = 1083
19*3 = 57
0.001*x^3 + 0.337*x^2 + 67.255*x + 7951 solve → [-199.617990197; -68.6910049017 - 187.383630981i; -68.6910049017 + 187.383630981i]
-((0.001*s^3 + 0.337*s^2 + 67.255*s + 7951)/((s + 6.65)*(s^2 + 330*s + 1.19*10^6)) - 5.25*10^24/(s^6 + 1.86*10^5*s^5 + 1.09*10^10*s^4 + 2.53*10^14*s^3 + 2.4*10^18*s^2 + 7.97*10^21*s + 4.75*10^21)) simplify → -(0.001*s^9 + 186.337*s^8 + 10962749.255*s^7 + 256685817381*s^6 + 2.48599555839e15*s^5 + 8.7959021809e18*s^4 - 5.2471459364e24*s^3 - 1.7668557945e27*s^2 - 6.25895743607e30*s - 4.15458372328e31)/((s + 0.59609193574)*(s + 21931.427588)*(s + 46665.0079763)*(s + 99941.4827852)*(s + 6.65)*(s^2 + 17461.4855585*s + 77906972.521)*(s^2 + 330.0*s + 1190000)) float, 3 → -1.0*(-6.26e30*s + (-1.77e27*s^2) + (-5.25e24*s^3) + 8.8e18*s^4 + 2.49e15*s^5 + 257000000000*s^6 + 11000000*s^7 + 186.0*s^8 + 0.001*s^9 - 4.15e31)/((s + 0.596)*(s + 21931.0)*(s + 46665.0)*(s + 99941.0)*(s + 6.65)*(17461.0*s + s^2 + 77900000)*(330.0*s + s^2 + 1190000)) expand → (6.26e30*s + 1.77e27*s^2 + 5.25e24*s^3 + (-8.8e18*s^4) + (-2.49e15*s^5) + (-257000000000*s^6) + (-11000000*s^7) + (-186.0*s^8) + (-0.001*s^9) + 4.15e31)/(6.87248091819e28*s + 9.52129666384e27*s^2 + 5.55062627121e24*s^3 + 9.07869924025e21*s^4 + 2.49800955933e18*s^5 + 2.5688190244e14*s^6 + 10963606984.7*s^7 + 186335.246*s^8 + s^9 + 3.75790433274e28) float, 3 → -(-6.26e30*s + (-1.77e27*s^2) + (-5.25e24*s^3) + 8.8e18*s^4 + 2.49e15*s^5 + 257000000000*s^6 + 11000000*s^7 + 186.0*s^8 + 0.001*s^9 - 4.15e31)/(6.87e28*s + 9.52e27*s^2 + 5.55e24*s^3 + 9.08e21*s^4 + 2.5e18*s^5 + 2.57e14*s^6 + 11000000000*s^7 + 186335.0*s^8 + s^9 + 3.76e28)
8
(s + 0.59609193574)*(s + 21931.427588)*(s + 46665.0079763)*(s + 99941.4827852)*(s + 6.65)*(s^2 + 17461.4855585*s + 77906972.521)*(s^2 + 330.0*s + 1190000) expand → 6.8733518875e28*s + 9.5223816525e27*s^2 + 5.5511194155e24*s^3 + 9.07967146565e21*s^4 + 2.49816884196e18*s^5 + 2.5689124109e14*s^6 + 10963809094.5*s^7 + 186336.65*s^8 + s^9 + 3.7589125e28
5.25*10^24/(s^6 + 1.86*10^5*s^5 + 1.09*10^10*s^4 + 2.53*10^14*s^3 + 2.4*10^18*s^2 + 7.97*10^21*s + 4.75*10^21) simplify → (1.5153948822e-21*s^4 + 8.78474810256e-17*s^3 + 4.02877731176e-12*s^2 - 4.19095158577e-8*s + 5.25e24)/((s + 0.59609193574)*(s + 21931.427588)*(s + 46665.0079763)*(s + 99941.4827852)*(s^2 + 17461.4855585*s + 77906972.521))
5.25*10^24/(s^6 + 1.86*10^5*s^5 + 1.09*10^10*s^4 + 2.53*10^14*s^3 + 2.4*10^18*s^2 + 7.97*10^21*s + 4.75*10^21)/((0.001*s^3 + 0.337*s^2 + 67.255*s + 7951)/((s + 6.65)*(s^2 + 330*s + 1.19*10^6))) simplify → (5.13131204194e-14*s^6 - 6.93889390391e-17*s^7 - 2.21193265676e-22*s^8 + 4.33863306171e-7*s^5 + 0.00330017941844*s^4 + 5.25e27*s^3 + 1.7674125e30*s^2 + 6.259021125e33*s + 4.1545875e34)/((s + 0.59609193574)*(s + 21931.427588)*(s + 46665.0079763)*(s + 99941.4827852)*(s + 199.617990197)*(s^2 + 17461.4855585*s + 77906972.521)*(s^2 + 137.382009803*s + 39831.0793139)) float, 3 → (6.26e33*s + 1.77e30*s^2 + 5.25e27*s^3 + 0.0033*s^4 + 4.34e-7*s^5 + 5.13e-14*s^6 + (-6.94e-17*s^7) + (-2.21e-22*s^8) + 4.15e34)/((s + 0.596)*(s + 21931.0)*(s + 46665.0)*(s + 99941.0)*(s + 200.0)*(17461.0*s + s^2 + 77900000)*(137.0*s + s^2 + 39831.0))
(6.26e33*s + 1.77e30*s^2 + 5.25e27*s^3 + 0.0033*s^4 + 4.34e-7*s^5 + 5.13e-14*s^6 + (-6.94e-17*s^7) + (-2.21e-22*s^8) + 4.15e34)/((s + 0.596)*(s + 21931.0)*(s + 46665.0)*(s + 99941.0)*(s + 200.0)*(17461.0*s + s^2 + 77900000)*(137.0*s + s^2 + 39831.0)) expand → (6.26e33*s + 1.77e30*s^2 + 5.25e27*s^3 + 0.0033*s^4 + 4.34e-7*s^5 + 5.13e-14*s^6 + (-6.94e-17*s^7) + (-2.21e-22*s^8) + 4.15e34)/(6.38026368549e28*s + 5.56487936952e26*s^2 + 2.85369179211e24*s^3 + 8.79493442199e21*s^4 + 2.48583624057e18*s^5 + 2.5667647579e14*s^6 + 10962547120.7*s^7 + 186335.596*s^8 + s^9 + 3.78293011884e28) float, 2 → (6.3e33*s + 1.8e30*s^2 + 5.2e27*s^3 + 0.0033*s^4 + 4.3e-7*s^5 + 5.1e-14*s^6 + (-6.9e-17*s^7) + (-2.2e-22*s^8) + 4.1e34)/(6.4e28*s + 5.6e26*s^2 + 2.9e24*s^3 + 8.8e21*s^4 + 2.5e18*s^5 + 2.6e14*s^6 + 11000000000*s^7 + 186335.0*s^8 + s^9 + 3.8e28)
