1
w8(s) := 22/((5*10^-3*s) + 1)
w15(s) := 3.76/((73*10^-4*s) + 1)
w33(s) := 0.55
w34(s) := 1.1/(43*10^-4*s)
w37(s) := 0.002
w38(s) := 0.55
wsum1(s) := w33(s)*w34(s) → 140.697674419/s
wsum2(s) := w15(s)*wsum1(s) → 529.023255814/(s*(73*s/10000 + 1))
f1(s) := (wsum2(s)*w8(s))/(1 + wsum2(s)*w38(s)) → 11638.5116279/(s*(290.962790698/(s*(73*s/10000 + 1)) + 1)*(s/200 + 1)*(73*s/10000 + 1))
f2(s) := 1/(1 + f1(s)*(1/wsum1(s))) → 1/(82.72/((290.962790698/(s*(73*s/10000 + 1)) + 1)*(s/200 + 1)*(73*s/10000 + 1)) + 1)
f3(s) := (f2(s)*w37(s))/(1 + f2(s)) → 0.002/((1/(82.72/((290.962790698/(s*(73*s/10000 + 1)) + 1)*(s/200 + 1)*(73*s/10000 + 1)) + 1) + 1)*(82.72/((290.962790698/(s*(73*s/10000 + 1)) + 1)*(s/200 + 1)*(73*s/10000 + 1)) + 1))
